// COMSOL Multiphysics 6.1.0.282 model "scaffold_project.mph"
// Outline of the model tree

Geometry
  geom1 "Geometry 1" (3D, length unit m)
    blk1: Block | size = {1, 1, 1}
    cyl1: Cylinder | pos = {0.3, 0.3, 0}; r = 0.2; h = 1.5
    cyl2: Cylinder | pos = {0.3, 0.7, 0}; r = 0.2; h = 1.5
    cyl3: Cylinder | pos = {0.7, 0.3, 0}; r = 0.2; h = 1.5
    cyl4: Cylinder | pos = {0.7, 0.7, 0}; r = 0.2; h = 1.5
    dif1: Difference | input = blk1; input2 = cyl1, cyl2, cyl3, cyl4
    fin: Finalize "Form Union"

Materials
  mat1: Common "HYSOL 0151 [solid,unclad]" on all domains
    def "Basic"
      thermalconductivity = 2.34000000e-01
      resistivity = 1.26000000e+13
      thermalexpansioncoefficient = (alpha(T)+(Tempref-293[K])*if(abs(T-Tempref)>1e-3,(alpha(T)-alpha(Tempref))/(T-Tempref),d(alpha(T),T)))/(1+alpha(Tempref)*(Tempref-293[K]))
      electricconductivity = 1.26000000e+13
      alpha: Piecewise | arg = T; pieces = {273.0, 343.16, 7.0E-5}; argunit = K; fununit = 1/K
    ThermalExpansion
      dL = (dL(T)-dL(Tempref))/(1+dL(Tempref))
      dL: Piecewise | arg = T; pieces = {273.0, 343.16, -0.02051+7.0E-5*T^1}; argunit = K
    Enu "Young's modulus and Poisson's ratio"
      E = 2.06850000e+09

Physics
  solid: SolidMechanics on all domains
    dependent variable u = {u, v, w}
    lemm1: LinearElasticModel "Linear Elastic Material 1" (default)
      E_mat = userdef
      E = 100e6
      nu_mat = userdef
      nu = 0.36
      rho_mat = userdef
      rho = 1240
    free1: Free (default)
    init1: init "Initial Values 1" (default)
    fix1: Fixed "Fixed Constraint 1" on boundaries 4
    bndl1: BoundaryLoad on boundaries 3 | FperArea = {0, 0, -10000}

Mesh
  mesh1 "Mesh 1" (physics-controlled)

Studies
  std1 "Study 1"
    stat: Stationary
  std2 "Study 2"
    stat: Stationary
  std3 "Study 3"
  std4 "Study 4"
    stat: Stationary

Solver configurations
  sol1 "Solution 1" (study std1)
    v1: Variables "Dependent Variables 1"
    s1: Stationary "Stationary Solver 1"
      fc1: FullyCoupled | linsolver = d1
      d1: Direct "Suggested Direct Solver (solid)" | linsolver = pardiso; pivotperturb = 1.0E-9
  sol2 "Solution 2" (study std4)
    // same settings as sol1

Datasets
  dset1: Solution | solution = sol1
  dset2: Solution | solution = sol2

Plots
  pg1: PlotGroup3D "Stress (solid)" | data = dset1
    vol1: Volume | expr = solid.mises
      def: Deform "Deformation" | expr = {u, v, w}; descr = Displacement field
  pg3: PlotGroup3D "3D Plot Group 3" | data = dset1
    surf1: Surface | expr = solid.mises
  pg4: PlotGroup3D "3D Plot Group 4" | data = dset1
    con1: Contour | expr = solid.mises
  pg5: PlotGroup3D "Stress (solid) 1" | data = dset2
    vol1: Volume | expr = solid.mises
      def: Deform "Deformation" | expr = {u, v, w}; descr = Displacement field